# OpenSim document version 40000
AnalyzeTool motion_prescribed_walking_analyze:
  model_file: ../resources/Rajagopal2016/subject_walk_for_cmc.osim
  replace_force_set: false
  results_directory: ../results/motion_prescribed_walking_analyze_results
  output_precision: 8
  initial_time: 0.82
  final_time: 2
  solve_for_equilibrium_for_auxiliary_states: true
  maximum_number_of_integrator_steps: 20000
  maximum_integrator_step_size: 1
  minimum_integrator_step_size: 1e-8
  integrator_error_tolerance: 1e-5
  external_loads_file: ../resources/Rajagopal2016/grf_walk.xml
  coordinates_file: ../resources/Rajagopal2016/coordinates.mot
  lowpass_cutoff_frequency_for_coordinates: 6
  AnalysisSet Analyses:
    StaticOptimization
