# OpenSim document version 40000
CMC_TaskSet:
  CMC_Joint [values shared by the 21 below unless stated]: weight=(1 1 1) active=(true false false) kp=(100 1 1)
      kv=(20 1 1) ka=(1 1 1) r0=(0 0 0) r1=(0 0 0) r2=(0 0 0) limit=0
  CMC_Joint pelvis_tilt: coordinate=pelvis_tilt
  CMC_Joint pelvis_list: coordinate=pelvis_list
  CMC_Joint pelvis_rotation: coordinate=pelvis_rotation
  CMC_Joint pelvis_tx: coordinate=pelvis_tx
  CMC_Joint pelvis_ty: coordinate=pelvis_ty
  CMC_Joint pelvis_tz: coordinate=pelvis_tz
  CMC_Joint hip_flexion_r: coordinate=hip_flexion_r
  CMC_Joint hip_adduction_r: coordinate=hip_adduction_r
  CMC_Joint hip_rotation_r: coordinate=hip_rotation_r
  CMC_Joint knee_angle_r: coordinate=knee_angle_r
  CMC_Joint knee_angle_r_beta: coordinate=knee_angle_r_beta
  CMC_Joint ankle_angle_r: coordinate=ankle_angle_r
  CMC_Joint hip_flexion_l: coordinate=hip_flexion_l
  CMC_Joint hip_adduction_l: coordinate=hip_adduction_l
  CMC_Joint hip_rotation_l: coordinate=hip_rotation_l
  CMC_Joint knee_angle_l: coordinate=knee_angle_l
  CMC_Joint knee_angle_l_beta: coordinate=knee_angle_l_beta
  CMC_Joint ankle_angle_l: coordinate=ankle_angle_l
  CMC_Joint lumbar_extension: coordinate=lumbar_extension
  CMC_Joint lumbar_bending: coordinate=lumbar_bending
  CMC_Joint lumbar_rotation: coordinate=lumbar_rotation
