# OpenSim document version 40000
Model mrsdeviceopt_subject02:
  gravity: 0 -9.80665 0
  length_units: meters
  force_units: N
  credits:
    Rajagopal 2016 model reduced to 18 muscles, using max isometric forces from Carmichael Ong's "gait8dof18musc."
  defaults:
    CoordinateActuator default: optimal_force=300
    PointActuator default: point=(0 0 0) point_is_global=false direction=(-1 0 0) force_is_global=true
        optimal_force=1000
    TorqueActuator default: torque_is_global=true axis=(-1 0 0) optimal_force=1
    Millard2012EquilibriumMuscle default: min_control=0.01 optimal_force=1 max_isometric_force=546
        optimal_fiber_length=0.0535 tendon_slack_length=0.078 pennation_angle_at_optimal=0 [radians]
        max_contraction_velocity=10
  Ground
  BodySet:
    Body pelvis: mass=11.95501 [kg] mass_center=(-0.0790932 0 0) inertia=(0.115361 0.115361 0.0684127 0 0 0)
        meshes=(r_pelvis.vtp l_pelvis.vtp sacrum.vtp)
      WrapCylinder Gmax1_at_pelvis_r: xyz_body_rotation=(-0.6 0.45 0) translation=(-0.0861411 -0.103005 0.0634677)
          quadrant=-x radius=0.04289578 length=0.1583559
      WrapCylinder Gmax2_at_pelvis_r: xyz_body_rotation=(-0.75 0.39 0) translation=(-0.0894973 -0.0863577 0.0707509)
          quadrant=all radius=0.042964 length=0.1052126
      WrapCylinder Gmax3_at_pelvis_r: xyz_body_rotation=(-0.1 0 0) translation=(-0.0928534 -0.09156 0.0707509)
          quadrant=all radius=0.0431834 length=0.1040454
      WrapCylinder Gmax1_at_pelvis_l: xyz_body_rotation=(0.6 -0.45 0) translation=(-0.0861411 -0.103005 -0.0634677)
          quadrant=-x radius=0.04289578 length=0.1583559
      WrapCylinder Gmax2_at_pelvis_l: xyz_body_rotation=(0.75 -0.39 0) translation=(-0.0894973 -0.0863577 -0.0707509)
          quadrant=all radius=0.042964 length=0.1052126
      WrapCylinder Gmax3_at_pelvis_l: xyz_body_rotation=(0.1 0 0) translation=(-0.0928534 -0.09156 -0.0707509)
          quadrant=all radius=0.0431834 length=0.1040454
      WrapCylinder PS_at_brim_r: xyz_body_rotation=(-0.25 -0.27 0.1) translation=(-0.082785 -0.0624273 0.0682538)
          quadrant=-y radius=0.05384582 length=0.1046216
      WrapCylinder PS_at_brim_l: xyz_body_rotation=(0.25 0.27 0.1) translation=(-0.082785 -0.0624273 -0.0682538)
          quadrant=-y radius=0.05384582 length=0.1046216
      WrapCylinder IL_at_brim_r: xyz_body_rotation=(-0.32 -0.24 0.9) translation=(-0.0794288 -0.0676295 0.0786583)
          quadrant=-y radius=0.05918492 length=0.1045032
      WrapCylinder IL_at_brim_l: xyz_body_rotation=(0.32 0.24 0.9) translation=(-0.0794288 -0.0676295 -0.0786583)
          quadrant=-y radius=0.05918492 length=0.1045032
    Body femur_r: mass=9.441988 mass_center=(0 -0.209564 0) inertia=(0.206553 0.0541451 0.217814 0 0 0)
        meshes=r_femur.vtp
      WrapCylinder Gastroc_at_condyles_r: translation=(0.00616366 -0.50542 0) quadrant=all radius=0.03081828
          length=0.1232731
      WrapCylinder KnExt_at_fem_r: xyz_body_rotation=(-0.0623366 0.0507601 0)
          translation=(0.00442339 -0.49646 0.00257778) quadrant=all radius=0.03081828 length=0.1232731
      WrapCylinder AB_at_femshaft_r: xyz_body_rotation=(1.66157 0.186644 0) translation=(0.0180514 -0.138799 0.0288028)
          quadrant=all radius=0.02034007 length=0.08629119
      WrapCylinder AL_at_femshaft_r: xyz_body_rotation=(1.77711 0.136489 0) translation=(0.0378852 -0.285881 0.0186311)
          quadrant=all radius=0.0247779 length=0.1232731
      WrapCylinder AMprox_at_femshaft_r: xyz_body_rotation=(1.61126 0.18656 0)
          translation=(0.00638923 -0.0898597 0.0313151) quadrant=all radius=0.02601063 length=0.08629119
      WrapCylinder AMmid_at_femshaft_r: xyz_body_rotation=(1.61139 0.13656 0)
          translation=(0.0283682 -0.198113 0.0253748) quadrant=all radius=0.02638045 length=0.1479278
      WrapCylinder AMdist_at_femshaft_r: xyz_body_rotation=(1.71188 0.186636 0)
          translation=(0.0389623 -0.321417 0.011544) quadrant=all radius=0.02687354 length=0.2465463
      WrapCylinder AMisch_at_condyles_r: xyz_body_rotation=(1.71115 -0.463363 0)
          translation=(-0.0279227 -0.464531 -0.00388849) quadrant=all radius=0.04930925 length=0.2958555
      WrapCylinder PECT_at_femshaft_r: xyz_body_rotation=(1.81295 0.276344 0)
          translation=(0.00750207 -0.104169 0.037525) quadrant=all radius=0.01849097 length=0.06163656
    Body tibia_r: mass=3.763538 mass_center=(0 -0.196257 0) inertia=(0.0559678 0.00458901 0.0559678 0 0 0)
        meshes=(r_tibia.vtp r_fibula.vtp)
      WrapCylinder GasLat_at_shank_r: xyz_body_rotation=(2.96723 -0.279725 -1.47812)
          translation=(-0.0077788 -0.077788 -0.0027827) quadrant=-y radius=0.05727668 length=0.08672024
      WrapCylinder GasMed_at_shank_r: xyz_body_rotation=(2.96723 0.0279725 -1.47812)
          translation=(-0.0077788 -0.077788 -0.0027827) quadrant=-y radius=0.05765601 length=0.08504199
      WrapCylinder GR_at_condyles_r: xyz_body_rotation=(0 -0.4 0) translation=(-0.00315357 -0.0210238 0) quadrant=all
          radius=0.03732422 length=0.08779515
      WrapCylinder SM_at_condyles_r: xyz_body_rotation=(0 -0.1 0) translation=(-0.00105119 -0.0210238 0) quadrant=all
          radius=0.03696895 length=0.08455683
      WrapCylinder ST_at_condyles_r: xyz_body_rotation=(0 -0.2 0) translation=(-0.00210238 -0.0215494 0) quadrant=all
          radius=0.04451781 length=0.0852413
      WrapCylinder BF_at_gastroc_r: translation=(-0.060969 -0.0630713 0) quadrant=y radius=0.03153566 length=0.1264865
    Body patella_r: mass=0.08750289 mass_center=(0.0018 0.0264 0) inertia=(2.91338e-6 1.33082e-5 1.33082e-5 0 0 0)
        meshes=r_patella.vtp
    Body talus_r: mass=0.1015115 mass_center=(0 0 0) inertia=(0.00119693 0.00119693 0.00119693 0 0 0)
        meshes=r_talus.vtp
    Body calcn_r: mass=1.268893 mass_center=(0.108587 0.032576 0) inertia=(0.0016757 0.00466803 0.00490742 0 0 0)
        meshes=r_foot.vtp
    Body toes_r: mass=0.2198739 mass_center=(0.037571 0.00651521 -0.0190027)
        inertia=(0.000119693 0.000239386 0.00119693 0 0 0) meshes=r_bofoot.vtp
    Body femur_l: mass=9.441988 mass_center=(0 -0.209564 0) inertia=(0.206553 0.0541451 0.217814 0 0 0)
        meshes=l_femur.vtp
      WrapCylinder Gastroc_at_condyles_l: translation=(0.00616366 -0.50542 0) quadrant=all radius=0.03081828
          length=0.1232731
      WrapCylinder KnExt_at_fem_l: xyz_body_rotation=(0.0623366 -0.0507601 0)
          translation=(0.00442339 -0.49646 -0.00257778) quadrant=all radius=0.03081828 length=0.1232731
      WrapCylinder AB_at_femshaft_l: xyz_body_rotation=(-1.66157 -0.186644 0)
          translation=(0.0180514 -0.138799 -0.0288028) quadrant=all radius=0.02034007 length=0.08629119
      WrapCylinder AL_at_femshaft_l: xyz_body_rotation=(-1.77711 -0.136489 0)
          translation=(0.0378852 -0.285881 -0.0186311) quadrant=all radius=0.0247779 length=0.1232731
      WrapCylinder AMprox_at_femshaft_l: xyz_body_rotation=(-1.61126 -0.18656 0)
          translation=(0.00638923 -0.0898597 -0.0313151) quadrant=all radius=0.02601063 length=0.08629119
      WrapCylinder AMmid_at_femshaft_l: xyz_body_rotation=(-1.61139 -0.13656 0)
          translation=(0.0283682 -0.198113 -0.0253748) quadrant=all radius=0.02638045 length=0.1479278
      WrapCylinder AMdist_at_femshaft_l: xyz_body_rotation=(-1.71188 -0.186636 0)
          translation=(0.0389623 -0.321417 -0.011544) quadrant=all radius=0.02687354 length=0.2465463
      WrapCylinder AMisch_at_condyles_l: xyz_body_rotation=(-1.71115 0.463363 0)
          translation=(-0.0279227 -0.464531 0.00388849) quadrant=all radius=0.04930925 length=0.2958555
      WrapCylinder PECT_at_femshaft_l: xyz_body_rotation=(-1.81295 -0.276344 0)
          translation=(0.00750207 -0.104169 -0.037525) quadrant=all radius=0.01849097 length=0.06163656
    Body tibia_l: mass=3.763538 mass_center=(0 -0.196257 0) inertia=(0.0559678 0.00458901 0.0559678 0 0 0)
        meshes=(l_tibia.vtp l_fibula.vtp)
      WrapCylinder GasLat_at_shank_l: xyz_body_rotation=(-2.96723 0.279725 -1.47812)
          translation=(-0.0077788 -0.077788 0.0027827) quadrant=-y radius=0.05727668 length=0.08672024
      WrapCylinder GasMed_at_shank_l: xyz_body_rotation=(-2.96723 -0.0279725 -1.47812)
          translation=(-0.0077788 -0.077788 0.0027827) quadrant=-y radius=0.05765601 length=0.08504199
      WrapCylinder GR_at_condyles_l: xyz_body_rotation=(0 0.4 0) translation=(-0.00315357 -0.0210238 0) quadrant=all
          radius=0.03732422 length=0.08779515
      WrapCylinder SM_at_condyles_l: xyz_body_rotation=(0 0.1 0) translation=(-0.00105119 -0.0210238 0) quadrant=all
          radius=0.03696895 length=0.08455683
      WrapCylinder ST_at_condyles_l: xyz_body_rotation=(0 0.2 0) translation=(-0.00210238 -0.0215494 0) quadrant=all
          radius=0.04451781 length=0.0852413
      WrapCylinder BF_at_gastroc_l: translation=(-0.060969 -0.0630713 0) quadrant=all radius=0.03153566
          length=0.1264865
    Body patella_l: mass=0.08750289 mass_center=(0.0018 0.0264 0) inertia=(2.91338e-6 1.33082e-5 1.33082e-5 0 0 0)
        meshes=l_pat.vtp
    Body talus_l: mass=0.1015115 mass_center=(0 0 0) inertia=(0.00119693 0.00119693 0.00119693 0 0 0)
        meshes=l_talus.vtp
    Body calcn_l: mass=1.268893 mass_center=(0.108587 0.032576 0) inertia=(0.0016757 0.00466803 0.00490742 0 0 0)
        meshes=l_foot.vtp
    Body toes_l: mass=0.2198739 mass_center=(0.037571 0.00651521 0.0190027)
        inertia=(0.000119693 0.000239386 0.00119693 0 0 0) meshes=l_bofoot.vtp
    Body torso: mass=27.23208 mass_center=(-0.0301149 0.321226 0) inertia=(1.50828 0.772806 1.46419 0 0 0)
        meshes=(hat_spine.vtp hat_jaw.vtp hat_skull.vtp hat_ribs_scap.vtp)
    Body humerus_r: mass=2.063221 mass_center=(0 -0.183669 0) inertia=(0.015117 0.0052149 0.0169684 0 0 0)
        meshes=humerus_rv.vtp
    Body ulna_r: mass=0.6166822 mass_center=(0 -0.137645 0) inertia=(0.00392165 0.000818224 0.00425397 0 0 0)
        meshes=ulna_rv.vtp
    Body radius_r: mass=0.6166822 mass_center=(0 -0.137645 0) inertia=(0.00392165 0.000818224 0.00425397 0 0 0)
        meshes=radius_rv.vtp
    Body hand_r: mass=0.464415 mass_center=(0 -0.0777678 0) inertia=(0.001181 0.000724221 0.00177414 0 0 0)
        meshes=(pisiform_rvs.vtp lunate_rvs.vtp scaphoid_rvs.vtp triquetrum_rvs.vtp hamate_rvs.vtp capitate_rvs.vtp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)
    Body humerus_l: mass=2.063221 mass_center=(0 -0.183669 0) inertia=(0.015117 0.0052149 0.0169684 0 0 0)
        meshes=humerus_lv.vtp
    Body ulna_l: mass=0.6166822 mass_center=(0 -0.137645 0) inertia=(0.00392165 0.000818224 0.00425397 0 0 0)
        meshes=ulna_lv.vtp
    Body radius_l: mass=0.6166822 mass_center=(0 -0.137645 0) inertia=(0.00392165 0.000818224 0.00425397 0 0 0)
        meshes=radius_lv.vtp
    Body hand_l: mass=0.464415 mass_center=(0 -0.0777678 0) inertia=(0.001181 0.000724221 0.00177414 0 0 0)
        meshes=(pisiform_lvs.vtp lunate_lvs.vtp scaphoid_lvs.vtp triquetrum_lvs.vtp hamate_lvs.vtp capitate_lvs.vtp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)
  JointSet:
    CustomJoint ground_pelvis: socket_parent_frame=ground_offset socket_child_frame=pelvis_offset
      Coordinate pelvis_tilt: default_value=0 range=(-1.570796 1.570796) clamped=true
      Coordinate pelvis_list: default_value=0 range=(-1.570796 1.570796) clamped=true
      Coordinate pelvis_rotation: default_value=0 range=(-1.570796 1.570796) clamped=true
      Coordinate pelvis_tx: default_value=0 range=(-5 5) clamped=true
      Coordinate pelvis_ty: default_value=0.93 range=(-1 2) clamped=true
      Coordinate pelvis_tz: default_value=0 range=(-3 3) clamped=true
      PhysicalOffsetFrame ground_offset: socket_parent=/ground translation=(0 0 0) [meters]
      PhysicalOffsetFrame pelvis_offset: socket_parent=/bodyset/pelvis translation=(0 0 0)
      SpatialTransform:
        TransformAxis rotation1: coordinates=pelvis_tilt axis=(0 0 1) LinearFunction(coefficients=1 0)
        TransformAxis rotation2: coordinates=pelvis_list axis=(1 0 0) LinearFunction(coefficients=1 0)
        TransformAxis rotation3: coordinates=pelvis_rotation axis=(0 1 0) LinearFunction(coefficients=1 0)
        TransformAxis translation1: coordinates=pelvis_tx axis=(1 0 0) LinearFunction(coefficients=1 0)
        TransformAxis translation2: coordinates=pelvis_ty axis=(0 1 0) LinearFunction(coefficients=1 0)
        TransformAxis translation3: coordinates=pelvis_tz axis=(0 0 1) LinearFunction(coefficients=1 0)
    CustomJoint hip_r: socket_parent_frame=pelvis_offset socket_child_frame=femur_r_offset
      Coordinate hip_flexion_r: default_value=0 range=(-0.5235988 2.094395) clamped=true
      Coordinate hip_adduction_r: default_value=0 range=(-0.8726646 0.5235988) clamped=true
      Coordinate hip_rotation_r: default_value=0 range=(-0.6981317 0.6981317) clamped=true
      PhysicalOffsetFrame pelvis_offset: socket_parent=/bodyset/pelvis translation=(-0.0629569 -0.0816652 0.0803855)
      PhysicalOffsetFrame femur_r_offset: socket_parent=/bodyset/femur_r translation=(0 0 0)
      SpatialTransform: axes_held_at_zero=(translation1 translation2 translation3)
        TransformAxis rotation1: coordinates=hip_flexion_r axis=(0 0 1) LinearFunction(coefficients=1 0)
        TransformAxis rotation2: coordinates=hip_adduction_r axis=(1 0 0) LinearFunction(coefficients=1 0)
        TransformAxis rotation3: coordinates=hip_rotation_r axis=(0 1 0) LinearFunction(coefficients=1 0)
    CustomJoint walker_knee_r: socket_parent_frame=femur_r_offset socket_child_frame=tibia_r_offset
      Coordinate knee_angle_r: default_value=0 range=(0 2.0944) clamped=false
      PhysicalOffsetFrame femur_r_offset: socket_parent=/bodyset/femur_r translation=(-0.0099728 -0.502905 -0.00339001)
          orientation=(-1.64157 1.44618 1.5708) [radians]
      PhysicalOffsetFrame tibia_r_offset: socket_parent=/bodyset/tibia_r
          translation=(-0.00850363 -0.00371574 -0.001252) orientation=(-1.64157 1.44618 1.5708)
      SpatialTransform: axes_held_at_zero=translation3
        TransformAxis rotation1: coordinates=knee_angle_r axis=(1 0 0) LinearFunction(coefficients=1 0)
        TransformAxis rotation2: coordinates=knee_angle_r axis=(0 0 1)
          SimmSpline: x=(0 0.174533 0.349066 0.523599 0.698132 0.872665 1.0472 1.22173 1.39626 1.5708 1.74533 1.91986 2.0944)
              y=(0 0.0126809 0.0226969 0.0296054 0.0332049 0.0335354 0.0308779 0.0257548 0.0189295 0.011407 0.00443314 -0.00050475 -0.0016782)
        TransformAxis rotation3: coordinates=knee_angle_r axis=(0 1 0)
          SimmSpline: x=(0 0.174533 0.349066 0.523599 0.698132 0.872665 1.0472 1.22173 1.39626 1.5708 1.74533 1.91986 2.0944)
              y=(0 0.059461 0.109399 0.150618 0.18392 0.210107 0.229983 0.24435 0.254012 0.25977 0.262428 0.262788 0.261654)
        TransformAxis translation1: coordinates=knee_angle_r axis=(0 1 0)
          MultiplierFunction: scale=1.232731
            SimmSpline: x=(0 0.174533 0.349066 0.523599 0.698132 0.872665 1.0472 1.22173 1.39626 1.5708 1.74533 1.91986 2.0944)
                y=(0 0.000479 0.000835 0.001086 0.001251 0.001346 0.001391 0.001403 0.0014 0.0014 0.001421 0.001481 0.001599)
        TransformAxis translation2: coordinates=knee_angle_r axis=(0 0 1)
          MultiplierFunction: scale=1.232731
            SimmSpline: x=(0 0.174533 0.349066 0.523599 0.698132 0.872665 1.0472 1.22173 1.39626 1.5708 1.74533 1.91986 2.0944)
                y=(0 0.000988 0.001899 0.002734 0.003492 0.004173 0.004777 0.005305 0.005756 0.00613 0.006427 0.006648 0.006792)
    CustomJoint patellofemoral_r: socket_parent_frame=femur_r_offset socket_child_frame=patella_r_offset
      Coordinate knee_angle_r_beta: default_value=0 range=(-99999.9 99999.9) clamped=false
      PhysicalOffsetFrame femur_r_offset: socket_parent=/bodyset/femur_r translation=(-0.0099728 -0.502905 -0.00339001)
      PhysicalOffsetFrame patella_r_offset: socket_parent=/bodyset/patella_r translation=(0 0 0)
      SpatialTransform: axes_held_at_zero=(rotation2 rotation3)
        TransformAxis rotation1: coordinates=knee_angle_r_beta axis=(0 0 1)
          SimmSpline: x=(0 0.174533 0.349066 0.523599 0.698132 0.872665 1.0472 1.22173 1.39626 1.5708 1.74533 1.91986 2.0944)
              y=(0.00113686 -0.00629212 -0.105582 -0.253683 -0.414245 -0.579047 -0.747244 -0.91799 -1.09044 -1.26379 -1.43763 -1.61186 -1.78634)
        TransformAxis translation1: coordinates=knee_angle_r_beta axis=(1 0 0)
          MultiplierFunction: scale=1.232731
            SimmSpline f9: x=(0 0.174533 0.349066 0.523599 0.698132 0.872665 1.0472 1.22173 1.39626 1.5708 1.74533 1.91986 2.0944)
                y=(0.0524 0.0488 0.0437 0.0371 0.0296 0.0216 0.0136 0.0057 -0.0019 -0.0088 -0.0148 -0.0196 -0.0227)
        TransformAxis translation2: coordinates=knee_angle_r_beta axis=(0 1 0)
          MultiplierFunction: scale=1.232731
            SimmSpline f10: x=(0 0.174533 0.349066 0.523599 0.698132 0.872665 1.0472 1.22173 1.39626 1.5708 1.74533 1.91986 2.0944)
                y=(-0.0108 -0.019 -0.0263 -0.0322 -0.0367 -0.0395 -0.0408 -0.0404 -0.0384 -0.0349 -0.0301 -0.0245 -0.0187)
        TransformAxis translation3: axis=(0 0 1) MultiplierFunction(scale=1.232731, Constant(value=0.00275))
    PinJoint ankle_r: socket_parent_frame=tibia_r_offset socket_child_frame=talus_r_offset
      Coordinate ankle_angle_r: default_value=0 range=(-0.6981317 0.5235988) clamped=true
      PhysicalOffsetFrame tibia_r_offset: socket_parent=/bodyset/tibia_r translation=(-0.0105119 -0.420476 0)
          orientation=(0.175895 -0.105208 0.0186622)
      PhysicalOffsetFrame talus_r_offset: socket_parent=/bodyset/talus_r translation=(0 0 0)
          orientation=(0.175895 -0.105208 0.0186622)
    PinJoint subtalar_r: socket_parent_frame=talus_r_offset socket_child_frame=calcn_r_offset
      Coordinate subtalar_angle_r: default_value=0 range=(-0.3490659 0.3490659) clamped=true locked=true
      PhysicalOffsetFrame talus_r_offset: socket_parent=/bodyset/talus_r translation=(-0.0529578 -0.0455521 0.00860007)
          orientation=(-1.76819 0.906223 1.8196)
      PhysicalOffsetFrame calcn_r_offset: socket_parent=/bodyset/calcn_r translation=(0 0 0)
          orientation=(-1.76819 0.906223 1.8196)
    PinJoint mtp_r: socket_parent_frame=calcn_r_offset socket_child_frame=toes_r_offset
      Coordinate mtp_angle_r: default_value=0 range=(-0.5235988 0.5235988) clamped=true locked=true
      PhysicalOffsetFrame calcn_r_offset: socket_parent=/bodyset/calcn_r translation=(0.194153 -0.00217174 0.00117274)
          orientation=(-3.14159 0.619901 0)
      PhysicalOffsetFrame toes_r_offset: socket_parent=/bodyset/toes_r translation=(0 0 0)
          orientation=(-3.14159 0.619901 0)
    CustomJoint hip_l: socket_parent_frame=pelvis_offset socket_child_frame=femur_l_offset
      Coordinate hip_flexion_l: default_value=0 range=(-0.5235988 2.094395) clamped=true
      Coordinate hip_adduction_l: default_value=0 range=(-0.8726646 0.5235988) clamped=true
      Coordinate hip_rotation_l: default_value=0 range=(-0.6981317 0.6981317) clamped=true
      PhysicalOffsetFrame pelvis_offset: socket_parent=/bodyset/pelvis translation=(-0.0629569 -0.0816652 -0.0803855)
      PhysicalOffsetFrame femur_l_offset: socket_parent=/bodyset/femur_l translation=(0 0 0)
      SpatialTransform: axes_held_at_zero=(translation1 translation2 translation3)
        TransformAxis rotation1: coordinates=hip_flexion_l axis=(0 0 1) LinearFunction(coefficients=1 0)
        TransformAxis rotation2: coordinates=hip_adduction_l axis=(1 0 0) LinearFunction(coefficients=-1 0)
        TransformAxis rotation3: coordinates=hip_rotation_l axis=(0 1 0) LinearFunction(coefficients=-1 0)
    CustomJoint walker_knee_l: socket_parent_frame=femur_l_offset socket_child_frame=tibia_l_offset
      Coordinate knee_angle_l: default_value=0 range=(0 2.0944) clamped=true
      PhysicalOffsetFrame femur_l_offset: socket_parent=/bodyset/femur_l translation=(-0.0099728 -0.502905 0.00339001)
          orientation=(1.64157 -1.44618 1.5708)
      PhysicalOffsetFrame tibia_l_offset: socket_parent=/bodyset/tibia_l translation=(-0.00850363 -0.00371574 0.001252)
          orientation=(1.64157 -1.44618 1.5708)
      SpatialTransform: axes_held_at_zero=translation3
        TransformAxis rotation1: coordinates=knee_angle_l axis=(-1 0 0) LinearFunction(coefficients=1 0)
        TransformAxis rotation2: coordinates=knee_angle_l axis=(0 0 1)
          SimmSpline: x=(0 0.174533 0.349066 0.523599 0.698132 0.872665 1.0472 1.22173 1.39626 1.5708 1.74533 1.91986 2.0944)
              y=(0 0.0126809 0.0226969 0.0296054 0.0332049 0.0335354 0.0308779 0.0257548 0.0189295 0.011407 0.00443314 -0.00050475 -0.0016782)
        TransformAxis rotation3: coordinates=knee_angle_l axis=(0 1 0)
          SimmSpline: x=(0 0.174533 0.349066 0.523599 0.698132 0.872665 1.0472 1.22173 1.39626 1.5708 1.74533 1.91986 2.0944)
              y=(0 -0.059461 -0.109399 -0.150618 -0.18392 -0.210107 -0.229983 -0.24435 -0.254012 -0.25977 -0.262428 -0.262788 -0.261654)
        TransformAxis translation1: coordinates=knee_angle_l axis=(0 1 0)
          MultiplierFunction: scale=1.232731
            SimmSpline: x=(0 0.174533 0.349066 0.523599 0.698132 0.872665 1.0472 1.22173 1.39626 1.5708 1.74533 1.91986 2.0944)
                y=(0 0.000479 0.000835 0.001086 0.001251 0.001346 0.001391 0.001403 0.0014 0.0014 0.001421 0.001481 0.001599)
        TransformAxis translation2: coordinates=knee_angle_l axis=(0 0 1)
          MultiplierFunction: scale=1.232731
            SimmSpline: x=(0 0.174533 0.349066 0.523599 0.698132 0.872665 1.0472 1.22173 1.39626 1.5708 1.74533 1.91986 2.0944)
                y=(0 -0.000988 -0.001899 -0.002734 -0.003492 -0.004173 -0.004777 -0.005305 -0.005756 -0.00613 -0.006427 -0.006648 -0.006792)
    CustomJoint patellofemoral_l: socket_parent_frame=femur_l_offset socket_child_frame=patella_l_offset
      Coordinate knee_angle_l_beta: default_value=0 range=(-99999.9 99999.9) clamped=false
      PhysicalOffsetFrame femur_l_offset: socket_parent=/bodyset/femur_l translation=(-0.0099728 -0.502905 0.00339001)
      PhysicalOffsetFrame patella_l_offset: socket_parent=/bodyset/patella_l translation=(0 0 0)
      SpatialTransform: axes_held_at_zero=(rotation2 rotation3)
        TransformAxis rotation1: coordinates=knee_angle_l_beta axis=(0 0 1)
          SimmSpline: x=(0 0.174533 0.349066 0.523599 0.698132 0.872665 1.0472 1.22173 1.39626 1.5708 1.74533 1.91986 2.0944)
              y=(0.00113686 -0.00629212 -0.105582 -0.253683 -0.414245 -0.579047 -0.747244 -0.91799 -1.09044 -1.26379 -1.43763 -1.61186 -1.78634)
        TransformAxis translation1: coordinates=knee_angle_l_beta axis=(1 0 0)
          MultiplierFunction: scale=1.232731
            SimmSpline f23: x=(0 0.174533 0.349066 0.523599 0.698132 0.872665 1.0472 1.22173 1.39626 1.5708 1.74533 1.91986 2.0944)
                y=(0.0524 0.0488 0.0437 0.0371 0.0296 0.0216 0.0136 0.0057 -0.0019 -0.0088 -0.0148 -0.0196 -0.0227)
        TransformAxis translation2: coordinates=knee_angle_l_beta axis=(0 1 0)
          MultiplierFunction: scale=1.232731
            SimmSpline f24: x=(0 0.174533 0.349066 0.523599 0.698132 0.872665 1.0472 1.22173 1.39626 1.5708 1.74533 1.91986 2.0944)
                y=(-0.0108 -0.019 -0.0263 -0.0322 -0.0367 -0.0395 -0.0408 -0.0404 -0.0384 -0.0349 -0.0301 -0.0245 -0.0187)
        TransformAxis translation3: axis=(0 0 1) MultiplierFunction(scale=1.232731, Constant(value=-0.00275))
    PinJoint ankle_l: socket_parent_frame=tibia_l_offset socket_child_frame=talus_l_offset
      Coordinate ankle_angle_l: default_value=0 range=(-0.6981317 0.5235988) clamped=true
      PhysicalOffsetFrame tibia_l_offset: socket_parent=/bodyset/tibia_l translation=(-0.0105119 -0.420476 0)
          orientation=(-0.175895 0.105208 0.0186622)
      PhysicalOffsetFrame talus_l_offset: socket_parent=/bodyset/talus_l translation=(0 0 0)
          orientation=(-0.175895 0.105208 0.0186622)
    PinJoint subtalar_l: socket_parent_frame=talus_l_offset socket_child_frame=calcn_l_offset
      Coordinate subtalar_angle_l: default_value=0 range=(-0.3490659 0.3490659) clamped=true locked=true
      PhysicalOffsetFrame talus_l_offset: socket_parent=/bodyset/talus_l
          translation=(-0.0529578 -0.0455521 -0.00860007) orientation=(1.76819 -0.906223 1.8196)
      PhysicalOffsetFrame calcn_l_offset: socket_parent=/bodyset/calcn_l translation=(0 0 0)
          orientation=(1.76819 -0.906223 1.8196)
    PinJoint mtp_l: socket_parent_frame=calcn_l_offset socket_child_frame=toes_l_offset
      Coordinate mtp_angle_l: default_value=0 range=(-0.5235988 0.5235988) clamped=true locked=true
      PhysicalOffsetFrame calcn_l_offset: socket_parent=/bodyset/calcn_l translation=(0.194153 -0.00217174 -0.00117274)
          orientation=(-3.14159 -0.619901 0)
      PhysicalOffsetFrame toes_l_offset: socket_parent=/bodyset/toes_l translation=(0 0 0)
          orientation=(-3.14159 -0.619901 0)
    CustomJoint back: socket_parent_frame=pelvis_offset socket_child_frame=torso_offset
      Coordinate lumbar_extension: default_value=0 range=(-1.570796 1.570796) clamped=true
      Coordinate lumbar_bending: default_value=0 range=(-1.570796 1.570796) clamped=true
      Coordinate lumbar_rotation: default_value=0 range=(-1.570796 1.570796) clamped=true
      PhysicalOffsetFrame pelvis_offset: socket_parent=/bodyset/pelvis translation=(-0.112655 0.084797 0)
      PhysicalOffsetFrame torso_offset: socket_parent=/bodyset/torso translation=(0 0 0)
      SpatialTransform: axes_held_at_zero=(translation1 translation2 translation3)
        TransformAxis rotation1: coordinates=lumbar_extension axis=(0 0 1) LinearFunction(coefficients=1 0)
        TransformAxis rotation2: coordinates=lumbar_bending axis=(1 0 0) LinearFunction(coefficients=1 0)
        TransformAxis rotation3: coordinates=lumbar_rotation axis=(0 1 0) LinearFunction(coefficients=1 0)
    CustomJoint acromial_r: socket_parent_frame=torso_offset socket_child_frame=humerus_r_offset
      Coordinate arm_flex_r: default_value=0 range=(-1.570796 1.570796) clamped=true
      Coordinate arm_add_r: default_value=0 range=(-2.094395 1.570796) clamped=true
      Coordinate arm_rot_r: default_value=0 range=(-1.570796 1.570796) clamped=true
      PhysicalOffsetFrame torso_offset: socket_parent=/bodyset/torso translation=(0.00316709 0.372923 0.170651)
      PhysicalOffsetFrame humerus_r_offset: socket_parent=/bodyset/humerus_r translation=(0 0 0)
      SpatialTransform: axes_held_at_zero=(translation1 translation2 translation3)
        TransformAxis rotation1: coordinates=arm_flex_r axis=(0 0 1) LinearFunction(coefficients=1 0)
        TransformAxis rotation2: coordinates=arm_add_r axis=(1 0 0) LinearFunction(coefficients=1 0)
        TransformAxis rotation3: coordinates=arm_rot_r axis=(0 1 0) LinearFunction(coefficients=1 0)
    PinJoint elbow_r: socket_parent_frame=humerus_r_offset socket_child_frame=ulna_r_offset
      Coordinate elbow_flex_r: default_value=0 range=(0 2.618) clamped=true
      PhysicalOffsetFrame humerus_r_offset: socket_parent=/bodyset/humerus_r
          translation=(0.0146755 -0.319628 -0.0107129) orientation=(-0.0228627 0.228018 0.0051689)
      PhysicalOffsetFrame ulna_r_offset: socket_parent=/bodyset/ulna_r translation=(0 0 0)
          orientation=(-0.0228627 0.228018 0.0051689)
    PinJoint radioulnar_r: socket_parent_frame=ulna_r_offset socket_child_frame=radius_r_offset
      Coordinate pro_sup_r: default_value=0 range=(0 1.570796) clamped=true
      PhysicalOffsetFrame ulna_r_offset: socket_parent=/bodyset/ulna_r translation=(-0.00768256 -0.0148546 0.029788)
          orientation=(-1.56884 0.056428 1.53614)
      PhysicalOffsetFrame radius_r_offset: socket_parent=/bodyset/radius_r translation=(0 0 0)
          orientation=(-1.56884 0.056428 1.53614)
    UniversalJoint radius_hand_r: socket_parent_frame=radius_r_offset socket_child_frame=hand_r_offset
      Coordinate wrist_flex_r: default_value=0 range=(-1.22173 1.22173) clamped=true locked=true
      Coordinate wrist_dev_r: default_value=0 range=(-0.4363323 0.6108652) clamped=true locked=true
      PhysicalOffsetFrame radius_r_offset: socket_parent=/bodyset/radius_r translation=(-0.0100466 -0.269342 0.0155433)
          orientation=(-1.5708 0 -1.5708)
      PhysicalOffsetFrame hand_r_offset: socket_parent=/bodyset/hand_r translation=(0 0 0)
          orientation=(-1.5708 0 -1.5708)
    CustomJoint acromial_l: socket_parent_frame=torso_offset socket_child_frame=humerus_l_offset
      Coordinate arm_flex_l: default_value=0 range=(-1.570796 1.570796) clamped=true
      Coordinate arm_add_l: default_value=0 range=(-2.094395 1.570796) clamped=true
      Coordinate arm_rot_l: default_value=0 range=(-1.570796 1.570796) clamped=true
      PhysicalOffsetFrame torso_offset: socket_parent=/bodyset/torso translation=(0.00316709 0.372923 -0.170651)
      PhysicalOffsetFrame humerus_l_offset: socket_parent=/bodyset/humerus_l translation=(0 0 0)
      SpatialTransform: axes_held_at_zero=(translation1 translation2 translation3)
        TransformAxis rotation1: coordinates=arm_flex_l axis=(0 0 1) LinearFunction(coefficients=1 0)
        TransformAxis rotation2: coordinates=arm_add_l axis=(-1 0 0) LinearFunction(coefficients=1 0)
        TransformAxis rotation3: coordinates=arm_rot_l axis=(0 -1 0) LinearFunction(coefficients=1 0)
    PinJoint elbow_l: socket_parent_frame=humerus_l_offset socket_child_frame=ulna_l_offset
      Coordinate elbow_flex_l: default_value=0 range=(0 2.618) clamped=true
      PhysicalOffsetFrame humerus_l_offset: socket_parent=/bodyset/humerus_l
          translation=(0.0146755 -0.319628 0.0107129) orientation=(0.0228627 -0.228018 0.0051689)
      PhysicalOffsetFrame ulna_l_offset: socket_parent=/bodyset/ulna_l translation=(0 0 0)
          orientation=(0.0228627 -0.228018 0.0051689)
    PinJoint radioulnar_l: socket_parent_frame=ulna_l_offset socket_child_frame=radius_l_offset
      Coordinate pro_sup_l: default_value=0 range=(0 1.570796) clamped=true
      PhysicalOffsetFrame ulna_l_offset: socket_parent=/bodyset/ulna_l translation=(-0.00768256 -0.0148546 -0.029788)
          orientation=(1.56884 -0.056428 1.53614)
      PhysicalOffsetFrame radius_l_offset: socket_parent=/bodyset/radius_l translation=(0 0 0)
          orientation=(1.56884 -0.056428 1.53614)
    UniversalJoint radius_hand_l: socket_parent_frame=radius_l_offset socket_child_frame=hand_l_offset
      Coordinate wrist_flex_l: default_value=0 range=(-1.22173 1.22173) clamped=true locked=true
      Coordinate wrist_dev_l: default_value=0 range=(-0.4363323 0.6108652) clamped=true locked=true
      PhysicalOffsetFrame radius_l_offset: socket_parent=/bodyset/radius_l
          translation=(-0.0100466 -0.269342 -0.0155433) orientation=(1.5708 0 1.5708)
      PhysicalOffsetFrame hand_l_offset: socket_parent=/bodyset/hand_l translation=(0 0 0)
          orientation=(1.5708 0 1.5708)
  ConstraintSet:
    CoordinateCouplerConstraint patellofemoral_knee_angle_r_con: independent_coordinate_names=knee_angle_r
        dependent_coordinate_name=knee_angle_r_beta scale_factor=1
        coupled_coordinates_function=LinearFunction(coefficients=1 0)
    CoordinateCouplerConstraint patellofemoral_knee_angle_l_con: independent_coordinate_names=knee_angle_l
        dependent_coordinate_name=knee_angle_l_beta scale_factor=1
        coupled_coordinates_function=LinearFunction(coefficients=1 0)
  ForceSet:
    PointActuator residual_pelvis_tx: body=pelvis point=(-0.09580391 -0.03559625 1.6332e-18) point_is_global=false
        direction=(1 0 0) force_is_global=true optimal_force=1.5
    PointActuator residual_pelvis_ty: body=pelvis point=(-0.09580391 -0.03559625 1.6332e-18) point_is_global=false
        direction=(0 1 0) force_is_global=true optimal_force=1.5
    PointActuator residual_pelvis_tz: body=pelvis point=(-0.09580391 -0.03559625 1.6332e-18) point_is_global=false
        direction=(0 0 1) force_is_global=true optimal_force=1.5
    TorqueActuator residual_pelvis_rx: bodyA=pelvis bodyB=ground torque_is_global=true axis=(1 0 0) optimal_force=1
    TorqueActuator residual_pelvis_ry: bodyA=pelvis bodyB=ground torque_is_global=true axis=(0 1 0) optimal_force=1
    TorqueActuator residual_pelvis_rz: bodyA=pelvis bodyB=ground torque_is_global=true axis=(0 0 1) optimal_force=1
    Millard2012EquilibriumMuscle [values shared by the 18 below unless stated]: fiber_damping=0.01
        default_activation=0.01 minimum_activation=0.01
      ActiveForceLengthCurve: min_norm_active_fiber_length=0.25 transition_norm_fiber_length=0.77
          max_norm_active_fiber_length=1.9 shallow_ascending_slope=0.75 minimum_value=0
      ForceVelocityCurve: concentric_slope_at_vmax=0 concentric_slope_near_vmax=0.25 isometric_slope=5
          eccentric_slope_at_vmax=0 eccentric_slope_near_vmax=0.15 max_eccentric_velocity_force_multiplier=1.4
      FiberForceLengthCurve: strain_at_zero_force=0 strain_at_one_norm_force=0.7
      TendonForceLengthCurve
    Millard2012EquilibriumMuscle bifemsh_r: max_isometric_force=557.1148 optimal_fiber_length=0.1324634
        tendon_slack_length=0.1270799 pennation_angle_at_optimal=0.2642232 ignore_tendon_compliance=true
      PathPoint bfsh_r-P1: femur_r (0.00616366 -0.26023 0.0288459)
      PathPoint bfsh_r-P2: tibia_r (-0.0316408 -0.0440448 0.0268151)
      PathWrap: wrap_object=BF_at_gastroc_r method=hybrid
    Millard2012EquilibriumMuscle med_gas_r: max_isometric_force=4690.574 optimal_fiber_length=0.05434745
        tendon_slack_length=0.4248866 pennation_angle_at_optimal=0.1656816
      PathPoint gasmed_r-P1: femur_r (0.00986185 -0.466959 -0.0256408)
      PathPoint gasmed_r-P2: calcn_r (0.00477782 0.0336619 -0.0057551)
      PathWrap: wrap_object=GasMed_at_shank_r method=hybrid
      PathWrap pathwrap_0: wrap_object=Gastroc_at_condyles_r method=hybrid
    Millard2012EquilibriumMuscle glut_max2_r: max_isometric_force=3337.584 optimal_fiber_length=0.1784524
        tendon_slack_length=0.07716322 pennation_angle_at_optimal=0.3673821 ignore_tendon_compliance=true
      PathPoint glmax2_r-P1: pelvis (-0.147335 0.00905195 0.048069)
      PathPoint glmax2_r-P2: pelvis (-0.150355 -0.0633637 0.0845889)
      PathPoint glmax2_r-P3: femur_r (-0.0554729 -0.0719915 0.0310648)
      PathPoint glmax2_r-P4: femur_r (-0.0192306 -0.125245 0.0516514)
      PathWrap: wrap_object=Gmax2_at_pelvis_r method=hybrid
    Millard2012EquilibriumMuscle psoas_r: max_isometric_force=2697.344 optimal_fiber_length=0.1282767
        tendon_slack_length=0.1092307 pennation_angle_at_optimal=0.2155251 ignore_tendon_compliance=true
      PathPoint P1: pelvis (-0.0677942 0.0645082 0.0405777)
      PathPoint P2: pelvis (-0.0229337 -0.0680457 0.0682538)
      PathPoint P3: femur_r (-0.0162721 -0.0575686 0.00567056)
      PathPoint P4: femur_r (-0.0289692 -0.0645951 0.010848)
      PathWrap: wrap_object=PS_at_brim_r method=hybrid range=(2 3)
    Millard2012EquilibriumMuscle rect_fem_r: max_isometric_force=2191.741 optimal_fiber_length=0.09126746
        tendon_slack_length=0.5392999 pennation_angle_at_optimal=0.2170149
      PathPoint recfem_r-P1: pelvis (-0.0268492 -0.0403696 0.0970744)
      PathPoint recfem_r-P2: patella_r (0.01 0.049 0.0007)
      PathPoint recfem_r-P3: patella_r (0.0121 0.0437 -0.001)
      PathPoint recfem_r-P4: patella_r (0.005 0.00247 3e-5)
      PathPoint recfem_r-P5: tibia_r (0.0342688 -0.066351 -0.000396324)
      PathWrap: wrap_object=KnExt_at_fem_r method=hybrid
    Millard2012EquilibriumMuscle semimem_r: max_isometric_force=4105.466 optimal_fiber_length=0.08503071
        tendon_slack_length=0.4283403 pennation_angle_at_optimal=0.2545615
      PathPoint P1: pelvis (-0.110417 -0.118612 0.0638839)
      PathPoint P2: tibia_r (-0.0304845 -0.0438346 -0.0165276)
      PathWrap: wrap_object=SM_at_condyles_r method=hybrid
    Millard2012EquilibriumMuscle soleus_r: max_isometric_force=7924.997 optimal_fiber_length=0.04632878
        tendon_slack_length=0.2914037 pennation_angle_at_optimal=0.3814289
      PathPoint P1: tibia_r (-0.00798903 -0.0962889 0.00826379)
      PathPoint P2: calcn_r (0.00477782 0.0336619 -0.0057551)
    Millard2012EquilibriumMuscle tib_ant_r: max_isometric_force=2116.818 optimal_fiber_length=0.07218053
        tendon_slack_length=0.2541231 pennation_angle_at_optimal=0.1951828
      PathPoint tibant_r-P1: tibia_r (0.0161883 -0.137916 0.0136605)
      PathPoint tibant_r-P2: tibia_r (0.0263848 -0.200357 0.0107935)
      PathPoint tibant_r-P3: tibia_r (0.0244927 -0.38463 -0.0111308)
      PathPoint tibant_r-P4: calcn_r (0.126612 0.0193284 -0.033119)
    Millard2012EquilibriumMuscle vas_int_r: max_isometric_force=9593.951 optimal_fiber_length=0.1196207
        tendon_slack_length=0.243591 pennation_angle_at_optimal=0.06309973
      PathPoint vasint_r-P1: femur_r (0.0357492 -0.237178 0.0382147)
      PathPoint vasint_r-P2: femur_r (0.0412965 -0.256901 0.0351328)
      PathPoint vasint_r-P3: patella_r (0.0058 0.048 -0.0006)
      PathPoint vasint_r-P4: patella_r (0.005 0.00247 -0.00039)
      PathPoint vasint_r-P5: tibia_r (0.0342372 -0.0664351 0.000362595)
      PathWrap: wrap_object=KnExt_at_fem_r method=hybrid
    Millard2012EquilibriumMuscle bifemsh_l: max_isometric_force=557.1148 optimal_fiber_length=0.1324634
        tendon_slack_length=0.1270799 pennation_angle_at_optimal=0.2642232 ignore_tendon_compliance=true
      PathPoint bfsh_l-P1: femur_l (0.00616366 -0.26023 -0.0288459)
      PathPoint bfsh_l-P2: tibia_l (-0.0316408 -0.0440448 -0.0268151)
      PathWrap: wrap_object=BF_at_gastroc_l method=hybrid
    Millard2012EquilibriumMuscle med_gas_l: max_isometric_force=4690.574 optimal_fiber_length=0.05434745
        tendon_slack_length=0.4248866 pennation_angle_at_optimal=0.1656816
      PathPoint gasmed_l-P1: femur_l (0.00986185 -0.466959 0.0256408)
      PathPoint gasmed_l-P2: calcn_l (0.00477782 0.0336619 0.0057551)
      PathWrap: wrap_object=GasMed_at_shank_l method=hybrid
      PathWrap pathwrap_0: wrap_object=Gastroc_at_condyles_l method=hybrid
    Millard2012EquilibriumMuscle glut_max2_l: max_isometric_force=3337.584 optimal_fiber_length=0.1784524
        tendon_slack_length=0.07716322 pennation_angle_at_optimal=0.3673821 ignore_tendon_compliance=true
      PathPoint glmax2_l-P1: pelvis (-0.147335 0.00905195 -0.048069)
      PathPoint glmax2_l-P2: pelvis (-0.150355 -0.0633637 -0.0845889)
      PathPoint glmax2_l-P3: femur_l (-0.0554729 -0.0719915 -0.0310648)
      PathPoint glmax2_l-P4: femur_l (-0.0192306 -0.125245 -0.0516514)
      PathWrap: wrap_object=Gmax2_at_pelvis_l method=hybrid
    Millard2012EquilibriumMuscle psoas_l: max_isometric_force=2697.344 optimal_fiber_length=0.1282767
        tendon_slack_length=0.1092307 pennation_angle_at_optimal=0.2155251 ignore_tendon_compliance=true
      PathPoint P1: pelvis (-0.0677942 0.0645082 -0.0405777)
      PathPoint P2: pelvis (-0.0229337 -0.0680457 -0.0682538)
      PathPoint P3: femur_l (-0.0162721 -0.0575686 -0.00567056)
      PathPoint P4: femur_l (-0.0289692 -0.0645951 -0.010848)
      PathWrap: wrap_object=PS_at_brim_l method=hybrid range=(2 3)
    Millard2012EquilibriumMuscle rect_fem_l: max_isometric_force=2191.741 optimal_fiber_length=0.09126746
        tendon_slack_length=0.5392999 pennation_angle_at_optimal=0.2170149
      PathPoint recfem_l-P1: pelvis (-0.0268492 -0.0403696 -0.0970744)
      PathPoint recfem_l-P2: patella_l (0.01 0.049 -0.0007)
      PathPoint recfem_l-P3: patella_l (0.0121 0.0437 0.001)
      PathPoint recfem_l-P4: patella_l (0.005 0.00247 -3e-5)
      PathPoint recfem_l-P5: tibia_l (0.0342688 -0.066351 0.000396324)
      PathWrap: wrap_object=KnExt_at_fem_l method=hybrid
    Millard2012EquilibriumMuscle semimem_l: max_isometric_force=4105.466 optimal_fiber_length=0.08503071
        tendon_slack_length=0.4283403 pennation_angle_at_optimal=0.2545615
      PathPoint P1: pelvis (-0.110417 -0.118612 -0.0638839)
      PathPoint P2: tibia_l (-0.0304845 -0.0438346 0.0165276)
      PathWrap: wrap_object=SM_at_condyles_l method=hybrid
    Millard2012EquilibriumMuscle soleus_l: max_isometric_force=7924.997 optimal_fiber_length=0.04632878
        tendon_slack_length=0.2914037 pennation_angle_at_optimal=0.3814289
      PathPoint P1: tibia_l (-0.00798903 -0.0962889 -0.00826379)
      PathPoint P2: calcn_l (0.00477782 0.0336619 0.0057551)
    Millard2012EquilibriumMuscle tib_ant_l: max_isometric_force=2116.818 optimal_fiber_length=0.07218053
        tendon_slack_length=0.2541231 pennation_angle_at_optimal=0.1951828
      PathPoint tibant_l-P1: tibia_l (0.0161883 -0.137916 -0.0136605)
      PathPoint tibant_l-P2: tibia_l (0.0263848 -0.200357 -0.0107935)
      PathPoint tibant_l-P3: tibia_l (0.0244927 -0.38463 0.0111308)
      PathPoint tibant_l-P4: calcn_l (0.126612 0.0193284 0.033119)
    Millard2012EquilibriumMuscle vas_int_l: max_isometric_force=9593.951 optimal_fiber_length=0.1196207
        tendon_slack_length=0.243591 pennation_angle_at_optimal=0.06309973
      PathPoint vasint_l-P1: femur_l (0.0357492 -0.237178 -0.0382147)
      PathPoint vasint_l-P2: femur_l (0.0412965 -0.256901 -0.0351328)
      PathPoint vasint_l-P3: patella_l (0.0058 0.048 0.0006)
      PathPoint vasint_l-P4: patella_l (0.005 0.00247 0.00039)
      PathPoint vasint_l-P5: tibia_l (0.0342372 -0.0664351 -0.000362595)
      PathWrap: wrap_object=KnExt_at_fem_l method=hybrid
    CoordinateActuator lumbar_ext: coordinate=lumbar_extension optimal_force=10
    CoordinateActuator lumbar_bend: coordinate=lumbar_bending optimal_force=10
    CoordinateActuator lumbar_rot: coordinate=lumbar_rotation optimal_force=10
    CoordinateActuator shoulder_flex_r: coordinate=arm_flex_r optimal_force=10
    CoordinateActuator shoulder_add_r: coordinate=arm_add_r optimal_force=10
    CoordinateActuator shoulder_rot_r: coordinate=arm_rot_r optimal_force=10
    CoordinateActuator elbow_flex_r: coordinate=elbow_flex_r optimal_force=10
    CoordinateActuator pro_sup_r: coordinate=pro_sup_r optimal_force=10
    CoordinateActuator wrist_flex_r: coordinate=wrist_flex_r optimal_force=10
    CoordinateActuator wrist_dev_r: coordinate=wrist_dev_r optimal_force=10
    CoordinateActuator shoulder_flex_l: coordinate=arm_flex_l optimal_force=10
    CoordinateActuator shoulder_add_l: coordinate=arm_add_l optimal_force=10
    CoordinateActuator shoulder_rot_l: coordinate=arm_rot_l optimal_force=10
    CoordinateActuator elbow_flex_l: coordinate=elbow_flex_l optimal_force=10
    CoordinateActuator pro_sup_l: coordinate=pro_sup_l optimal_force=10
    CoordinateActuator wrist_flex_l: coordinate=wrist_flex_l optimal_force=10
    CoordinateActuator wrist_dev_l: coordinate=wrist_dev_l optimal_force=10
  MarkerSet:
    Marker RACR: torso (-0.0114618 0.405909 0.148768)
    Marker LACR: torso (-0.0181382 0.408025 -0.154556)
    Marker C7: torso (-0.0639481 0.403114 0.00406509)
    Marker CLAV: torso (0.0734225 0.355586 0.0253821)
    Marker RASH: torso (0.050775 0.363399 0.139502)
    Marker RPSH: torso (-0.0778711 0.353491 0.161637)
    Marker LASH: torso (0.0466878 0.365924 -0.14102)
    Marker LPSH: torso (-0.0848946 0.345067 -0.174786)
    Marker RSJC: humerus_r (-0.0237883 0.0146834 -0.0105257)
    Marker RUA1: humerus_r (-0.0138258 -0.0697948 0.0355102)
    Marker RUA2: humerus_r (0.0281453 -0.136765 0.00311737)
    Marker RUA3: humerus_r (-0.0359172 -0.176437 0.0147788)
    Marker RLEL: humerus_r (0.0175021 -0.314393 0.0313456)
    Marker RMEL: humerus_r (-0.00115338 -0.311684 -0.0473506)
    Marker RFAsuperior: ulna_r (0.0239819 -0.100701 0.0544522)
    Marker RFAradius: radius_r (0.0197242 -0.259593 0.0319767)
    Marker RFAulna: radius_r (-0.0449555 -0.251032 0.00239682)
    Marker LSJC: humerus_l (-0.0291175 0.00408604 0.0098834)
    Marker LUA1: humerus_l (-0.0192825 -0.0687472 -0.0427754)
    Marker LUA2: humerus_l (0.0225253 -0.115385 -0.0253782)
    Marker LUA3: humerus_l (-0.0556922 -0.159743 0.00968081)
    Marker LLEL: humerus_l (0.0191004 -0.317731 -0.0302531)
    Marker LMEL: humerus_l (-0.000419573 -0.326496 0.047318)
    Marker LFAsuperior: ulna_l (0.0231361 -0.0919233 -0.0530632)
    Marker LFAradius: radius_l (0.0171852 -0.256055 -0.0373249)
    Marker LFAulna: radius_l (-0.0429293 -0.255922 0.00381265)
    Marker RASI: pelvis (0.00743901 0.00927492 0.126824)
    Marker LASI: pelvis (0.00922207 -0.0106249 -0.135865)
    Marker RPSI: pelvis (-0.177378 0.0170442 0.0375727)
    Marker LPSI: pelvis (-0.173377 0.0153174 -0.046408)
    Marker LHJC: femur_l (0.0068972 -0.00123608 -0.00992844)
    Marker RHJC: femur_r (0.00195892 0.00805725 0.0120841)
    Marker RTH1: femur_r (0.00250342 -0.0896769 0.107965)
    Marker RTH2: femur_r (0.0430981 -0.197659 0.0978278)
    Marker RTH3: femur_r (-0.0424695 -0.307056 0.0751594)
    Marker RLFC: femur_r (-0.0105409 -0.480494 0.0728972)
    Marker RMFC: femur_r (-0.0493059 -0.494621 -0.04501)
    Marker RKJC: tibia_r (-0.0284534 0.0116323 0.0160818)
    Marker RTB1: tibia_r (0.0211571 -0.109235 0.00427323)
    Marker RTB2: tibia_r (0.00662757 -0.176559 0.0739712)
    Marker RTB3: tibia_r (0.0296841 -0.276068 0.00183974)
    Marker RLMAL: tibia_r (0.00218056 -0.406726 0.0395482)
    Marker RMMAL: tibia_r (0.0106898 -0.394315 -0.0402845)
    Marker RAJC: talus_r (0.0169471 0.0199551 -0.000368168)
    Marker RCAL: calcn_r (0.00192794 0.0325288 -0.0173364)
    Marker RTOE: calcn_r (0.21993 0.00898581 -0.0543186)
    Marker RMT5: calcn_r (0.184234 -0.00431031 0.0563918)
    Marker LTH1: femur_l (-4.7701e-5 -0.144796 -0.103867)
    Marker LTH2: femur_l (0.0429048 -0.269671 -0.0878384)
    Marker LTH3: femur_l (-0.0408257 -0.376366 -0.071559)
    Marker LLFC: femur_l (-0.0253293 -0.477187 -0.0682523)
    Marker LMFC: femur_l (-0.0457959 -0.483117 0.0545526)
    Marker LKJC: tibia_l (-0.0341248 0.0190087 -0.00898014)
    Marker LTB1: tibia_l (0.0130849 -0.107245 -0.0182799)
    Marker LTB2: tibia_l (-0.00720607 -0.194056 -0.0716647)
    Marker LTB3: tibia_l (0.0249982 -0.306152 -0.00610701)
    Marker LLMAL: tibia_l (-0.0085244 -0.416319 -0.0422701)
    Marker LMMAL: tibia_l (0.00293695 -0.406614 0.0370701)
    Marker LAJC: talus_l (0.00771833 0.00900901 -0.00259997)
    Marker LCAL: calcn_l (-0.00387369 0.021455 0.0129594)
    Marker LTOE: calcn_l (0.224212 0.00695346 0.0480953)
    Marker LMT5: calcn_l (0.180539 -0.0147393 -0.0578237)
    Marker REJC: ulna_r (0.00726816 0.00632198 -0.000479502)
    Marker LEJC: ulna_l (-0.00134944 0.00603758 -0.0010605)
  ProbeSet:
    Umberger2010MuscleMetabolicsProbe metabolic_power: probe_operation=value activation_maintenance_rate_on=true
        shortening_rate_on=true basal_rate_on=true mechanical_work_rate_on=true muscle_effort_scaling_factor=1
        report_total_metabolics_only=false
      Umberger2010MuscleMetabolicsProbe_MetabolicMuscleParameterSet:
        Umberger2010MuscleMetabolicsProbe_MetabolicMuscleParameter [values shared by the 18 below unless stated]: specific_tension=600000 [N/m^2]
            use_provided_muscle_mass=false
        Umberger2010MuscleMetabolicsProbe_MetabolicMuscleParameter bifemsh_r: ratio_slow_twitch_fibers=0.529
        Umberger2010MuscleMetabolicsProbe_MetabolicMuscleParameter med_gas_r: ratio_slow_twitch_fibers=0.566
        Umberger2010MuscleMetabolicsProbe_MetabolicMuscleParameter glut_max2_r: ratio_slow_twitch_fibers=0.55
        Umberger2010MuscleMetabolicsProbe_MetabolicMuscleParameter psoas_r: ratio_slow_twitch_fibers=0.5
        Umberger2010MuscleMetabolicsProbe_MetabolicMuscleParameter rect_fem_r: ratio_slow_twitch_fibers=0.3865
        Umberger2010MuscleMetabolicsProbe_MetabolicMuscleParameter semimem_r: ratio_slow_twitch_fibers=0.4925
        Umberger2010MuscleMetabolicsProbe_MetabolicMuscleParameter soleus_r: ratio_slow_twitch_fibers=0.803
        Umberger2010MuscleMetabolicsProbe_MetabolicMuscleParameter tib_ant_r: ratio_slow_twitch_fibers=0.7
        Umberger2010MuscleMetabolicsProbe_MetabolicMuscleParameter vas_int_r: ratio_slow_twitch_fibers=0.543
        Umberger2010MuscleMetabolicsProbe_MetabolicMuscleParameter bifemsh_l: ratio_slow_twitch_fibers=0.529
        Umberger2010MuscleMetabolicsProbe_MetabolicMuscleParameter med_gas_l: ratio_slow_twitch_fibers=0.566
        Umberger2010MuscleMetabolicsProbe_MetabolicMuscleParameter glut_max2_l: ratio_slow_twitch_fibers=0.55
        Umberger2010MuscleMetabolicsProbe_MetabolicMuscleParameter psoas_l: ratio_slow_twitch_fibers=0.5
        Umberger2010MuscleMetabolicsProbe_MetabolicMuscleParameter rect_fem_l: ratio_slow_twitch_fibers=0.3865
        Umberger2010MuscleMetabolicsProbe_MetabolicMuscleParameter semimem_l: ratio_slow_twitch_fibers=0.4925
        Umberger2010MuscleMetabolicsProbe_MetabolicMuscleParameter soleus_l: ratio_slow_twitch_fibers=0.803
        Umberger2010MuscleMetabolicsProbe_MetabolicMuscleParameter tib_ant_l: ratio_slow_twitch_fibers=0.7
        Umberger2010MuscleMetabolicsProbe_MetabolicMuscleParameter vas_int_l: ratio_slow_twitch_fibers=0.543
