# OpenSim document version 30000
InverseKinematicsTool walk:
  results_directory: ./results_walk
  model_file: ../Scale/subject_scaled_walk.osim
  constraint_weight: Inf
  accuracy: 1e-5
  marker_file: ../ExpData/motion_capture_walk.trc
  time_range: 0 2.37
  report_errors: true
  output_motion_file: ./results_walk/ik_output_walk.mot
  report_marker_locations: false
  IKTaskSet:
    # Upper-body markers (anatomical and tracking).
    IKMarkerTask R.Shoulder: apply=true weight=250
    IKMarkerTask L.Shoulder: apply=true weight=250
    IKMarkerTask R.Clavicle: apply=true weight=250
    IKMarkerTask L.Clavicle: apply=true weight=250
    IKMarkerTask R.Biceps: apply=false weight=1
    IKMarkerTask L.Biceps: apply=false weight=1
    IKMarkerTask R.Elbow: apply=true weight=2
    IKMarkerTask L.Elbow: apply=true weight=2
    IKMarkerTask R.MElbow: apply=false weight=0
    IKMarkerTask L.MElbow: apply=false weight=0
    IKMarkerTask R.Forearm: apply=true weight=1
    IKMarkerTask L.Forearm: apply=true weight=1
    IKMarkerTask R.Wrist: apply=true weight=1
    IKMarkerTask L.Wrist: apply=true weight=1
    # Lower-body anatomical markers
    IKMarkerTask R.ASIS: apply=true weight=250
    IKMarkerTask L.ASIS: apply=true weight=250
    IKMarkerTask S2: apply=true weight=50
    IKMarkerTask R.PSIS: apply=true weight=250
    IKMarkerTask L.PSIS: apply=true weight=250
    IKMarkerTask R_HJC: apply=false weight=1
    IKMarkerTask L_HJC: apply=false weight=1
    IKMarkerTask R.Knee: apply=true weight=250
    IKMarkerTask L.Knee: apply=true weight=250
    IKMarkerTask R.MKnee: apply=false weight=0
    IKMarkerTask L.MKnee: apply=false weight=0
    IKMarkerTask R.Ankle: apply=true weight=50
    IKMarkerTask L.Ankle: apply=true weight=50
    IKMarkerTask R.MAnkle: apply=false weight=0
    IKMarkerTask L.MAnkle: apply=false weight=0
    IKMarkerTask R.Toe: apply=true weight=100
    IKMarkerTask L.Toe: apply=true weight=100
    IKMarkerTask R.MT5: apply=true weight=250
    IKMarkerTask L.MT5: apply=true weight=250
    IKMarkerTask R.Heel: apply=true weight=500
    IKMarkerTask L.Heel: apply=true weight=500
    # Lower-body tracking markers.
    IKMarkerTask R.TH1: apply=true weight=5
    IKMarkerTask R.TH2: apply=true weight=5
    IKMarkerTask R.TH3: apply=true weight=5
    IKMarkerTask R.SH1: apply=true weight=5
    IKMarkerTask R.SH2: apply=true weight=5
    IKMarkerTask R.SH3: apply=true weight=5
    IKMarkerTask R.SH4: apply=true weight=1
    IKMarkerTask L.TH1: apply=true weight=15
    IKMarkerTask L.TH2: apply=true weight=15
    IKMarkerTask L.TH3: apply=true weight=15
    IKMarkerTask L.TH4: apply=true weight=15
    IKMarkerTask L.SH1: apply=true weight=5
    IKMarkerTask L.SH2: apply=true weight=5
    IKMarkerTask L.SH3: apply=true weight=5
