# OpenSim document version 30000
ScaleTool subject_scale_walk:
  mass: 0 [kg]
  height: -1
  age: -1
  GenericModelMaker:
    model_file: subject_scaled_walk_18musc.osim
  ModelScaler:
    apply: true
    time_range: -1 -1
    preserve_mass_distribution: false
  MarkerPlacer:
    apply: true
    marker_file: static_walk_2.trc
    time_range: 0 0.1
    output_motion_file: scale_output_walk_18musc.mot
    output_model_file: subject_scaled_walk_18musc.osim
    output_marker_file: subject_scaled_walk_18musc_markerset.xml
    max_marker_movement: -1
    IKTaskSet:
      IKMarkerTask L.Shoulder: apply=true weight=5
      IKMarkerTask R.Shoulder: apply=true weight=5
      IKMarkerTask L.Clavicle: apply=true weight=3
      IKMarkerTask R.Clavicle: apply=true weight=3
      IKMarkerTask L.Elbow: apply=true weight=5
      IKMarkerTask R.Elbow: apply=true weight=5
      IKMarkerTask L.MElbow: apply=false weight=0
      IKMarkerTask R.MElbow: apply=false weight=0
      IKMarkerTask L.Wrist: apply=true weight=5
      IKMarkerTask R.Wrist: apply=true weight=5
      IKMarkerTask L.ASIS: apply=true weight=20
      IKMarkerTask R.ASIS: apply=true weight=20
      IKMarkerTask L.PSIS: apply=true weight=10
      IKMarkerTask R.PSIS: apply=true weight=10
      IKMarkerTask S2: apply=true weight=5
      IKMarkerTask L_HJC: apply=false weight=0
      IKMarkerTask R_HJC: apply=false weight=0
      IKMarkerTask L.Knee: apply=true weight=15
      IKMarkerTask R.Knee: apply=true weight=15
      IKMarkerTask L.MKnee: apply=false weight=0
      IKMarkerTask R.MKnee: apply=false weight=0
      IKMarkerTask L.Ankle: apply=true weight=25
      IKMarkerTask R.Ankle: apply=true weight=25
      IKMarkerTask L.MAnkle: apply=false weight=0
      IKMarkerTask R.MAnkle: apply=false weight=0
      IKMarkerTask L.ToeGround: apply=false weight=5
      IKMarkerTask R.ToeGround: apply=false weight=5
      IKMarkerTask L.MT5Ground: apply=false weight=100
      IKMarkerTask R.MT5Ground: apply=false weight=100
      IKMarkerTask L.HeelGround: apply=false weight=100
      IKMarkerTask R.HeelGround: apply=false weight=100
      IKMarkerTask L.Toe: apply=true weight=5
      IKMarkerTask R.Toe: apply=true weight=5
      IKMarkerTask L.MT5: apply=true weight=100
      IKMarkerTask R.MT5: apply=true weight=100
      IKMarkerTask L.Heel: apply=true weight=100
      IKMarkerTask R.Heel: apply=true weight=100
      IKMarkerTask L.AnkleJoint: apply=false weight=0
      IKMarkerTask R.AnkleJoint: apply=false weight=0
      IKMarkerTask L.AnkleJointGround: apply=false weight=0
      IKMarkerTask R.AnkleJointGround: apply=false weight=0
      IKMarkerTask L.Biceps: apply=false weight=0
      IKMarkerTask R.Biceps: apply=false weight=0
      IKMarkerTask L.Forearm: apply=false weight=0
      IKMarkerTask R.Forearm: apply=false weight=0
      IKMarkerTask L.TH1: apply=false weight=0
      IKMarkerTask R.TH1: apply=false weight=0
      IKMarkerTask L.TH2: apply=false weight=0
      IKMarkerTask R.TH2: apply=false weight=0
      IKMarkerTask L.TH3: apply=false weight=0
      IKMarkerTask R.TH3: apply=false weight=0
      IKMarkerTask L.SH1: apply=false weight=0
      IKMarkerTask R.SH1: apply=false weight=0
      IKMarkerTask L.SH2: apply=false weight=0
      IKMarkerTask R.SH2: apply=false weight=0
      IKMarkerTask L.SH3: apply=false weight=0
      IKMarkerTask R.SH3: apply=false weight=0
      IKMarkerTask R.SH4: apply=false weight=0
      IKMarkerTask L.TH4: apply=false weight=0
      IKMarkerTask L.KneeJoint: apply=false weight=0
      IKMarkerTask R.KneeJoint: apply=false weight=0
      IKMarkerTask MidASIS: apply=false weight=0
      IKMarkerTask MidPSIS: apply=false weight=0
      IKMarkerTask MidClavicle: apply=false weight=0
      IKMarkerTask Head: apply=false weight=0
