# OpenSim document version 40000
ScaleTool subject_scale_walk_scaleOnly:
  mass: 85.0668 [kg]
  height: 1829
  age: 31
  GenericModelMaker:
    marker_set_file: markerset_walk_preScale.xml
  ModelScaler:
    apply: true
    scaling_order: measurements manualScale
    marker_file: static_walk_1.trc
    time_range: 0 2.86
    preserve_mass_distribution: true
    output_scale_file: scaleSet_applied_walk.xml
    MeasurementSet:
      Measurement PelvisX: apply=true
        MarkerPair: markers=(MidPSIS MidASIS)
        BodyScale pelvis: axes=X
      Measurement PelvisY: apply=true
        MarkerPair: markers=(L.ASIS L_HJC)
        MarkerPair: markers=(R.ASIS R_HJC)
        MarkerPair: markers=(L.PSIS L_HJC)
        MarkerPair: markers=(R.PSIS R_HJC)
        BodyScale pelvis: axes=Y
      Measurement PelvisZ: apply=true
        MarkerPair: markers=(L.ASIS R.ASIS)
        MarkerPair: markers=(L_HJC R_HJC)
        BodyScale pelvis: axes=Z
      Measurement footX: apply=true
        MarkerPair: markers=(L.HeelGround L.MT5Ground)
        MarkerPair: markers=(R.HeelGround R.MT5Ground)
        MarkerPair: markers=(L.HeelGround L.ToeGround)
        MarkerPair: markers=(R.HeelGround R.ToeGround)
        BodyScale talus_r: axes=X
        BodyScale calcn_r: axes=X
        BodyScale toes_r: axes=X
        BodyScale talus_l: axes=X
        BodyScale calcn_l: axes=X
        BodyScale toes_l: axes=X
      Measurement footY: apply=true
        MarkerPair: markers=(L.AnkleJoint L.AnkleJointGround)
        MarkerPair: markers=(R.AnkleJoint R.AnkleJointGround)
        BodyScale talus_r: axes=Y
        BodyScale calcn_r: axes=Y
        BodyScale toes_r: axes=Y
        BodyScale talus_l: axes=Y
        BodyScale calcn_l: axes=Y
        BodyScale toes_l: axes=Y
      Measurement footZ: apply=true
        MarkerPair: markers=(L.MT5Ground L.ToeGround)
        MarkerPair: markers=(R.MT5Ground R.ToeGround)
        BodyScale talus_r: axes=Z
        BodyScale calcn_r: axes=Z
        BodyScale toes_r: axes=Z
        BodyScale talus_l: axes=Z
        BodyScale calcn_l: axes=Z
        BodyScale toes_l: axes=Z
    ScaleSet:
      Scale: scales=(0.958 0.958 0.958) segment=femur_r apply=true
      Scale: scales=(1.149 1.149 1.149) segment=tibia_r apply=true
      Scale: scales=(0.958 0.958 0.958) segment=patella_r apply=true
      Scale: scales=(0.958 0.958 0.958) segment=femur_l apply=true
      Scale: scales=(1.149 1.149 1.149) segment=tibia_l apply=true
      Scale: scales=(0.958 0.958 0.958) segment=patella_l apply=true
      Scale: scales=(1.21013 1.17781 1.21013) segment=torso apply=true
      Scale: scales=(1.09817 1.09817 1.09817) segment=humerus_r apply=true
      Scale: scales=(1.01397 1.01397 1.01397) segment=ulna_r apply=true
      Scale: scales=(1.01397 1.01397 1.01397) segment=radius_r apply=true
      Scale: scales=(1.09817 1.09817 1.09817) segment=humerus_l apply=true
      Scale: scales=(1.01397 1.01397 1.01397) segment=ulna_l apply=true
      Scale: scales=(1.01397 1.01397 1.01397) segment=radius_l apply=true
  MarkerPlacer:
    apply: true
    marker_file: static_walk_1.trc
    time_range: 0 0.3
    output_motion_file: C:\Users\Nick\Repos\mocopaper\resources\Rajagopal2016\scale_output_walk_18musc.mot
    output_model_file: subject_scaled_walk_18musc.osim
    output_marker_file: C:\Users\Nick\Repos\mocopaper\resources\Rajagopal2016\subject_scaled_walk_18musc_markerset.xml
    max_marker_movement: -1
    IKTaskSet:
      IKMarkerTask R.Shoulder: apply=true weight=5
      IKMarkerTask L.Shoulder: apply=true weight=5
      IKMarkerTask R.Clavicle: apply=true weight=3
      IKMarkerTask L.Clavicle: apply=true weight=3
      IKMarkerTask R.Elbow: apply=true weight=5
      IKMarkerTask R.MElbow: apply=true weight=5
      IKMarkerTask R.Wrist: apply=true weight=5
      IKMarkerTask L.Elbow: apply=true weight=5
      IKMarkerTask L.MElbow: apply=true weight=5
      IKMarkerTask L.Wrist: apply=true weight=5
      IKMarkerTask R.ASIS: apply=true weight=20
      IKMarkerTask L.ASIS: apply=true weight=20
      IKMarkerTask S2: apply=true weight=5
      IKMarkerTask R.PSIS: apply=true weight=10
      IKMarkerTask L.PSIS: apply=true weight=10
      IKMarkerTask R_HJC: apply=true weight=50
      IKMarkerTask L_HJC: apply=true weight=50
      IKMarkerTask R.Knee: apply=true weight=15
      IKMarkerTask R.MKnee: apply=true weight=15
      IKMarkerTask R.Ankle: apply=true weight=25
      IKMarkerTask R.MAnkle: apply=true weight=5
      IKMarkerTask L.Knee: apply=true weight=15
      IKMarkerTask L.MKnee: apply=true weight=15
      IKMarkerTask L.Ankle: apply=true weight=25
      IKMarkerTask L.MAnkle: apply=true weight=5
      IKMarkerTask L.HeelGround: apply=true weight=100
      IKMarkerTask L.MT5Ground: apply=true weight=100
      IKMarkerTask L.ToeGround: apply=true weight=5
      IKMarkerTask R.HeelGround: apply=true weight=100
      IKMarkerTask R.MT5Ground: apply=true weight=100
      IKMarkerTask R.ToeGround: apply=true weight=5
